// COMSOL Multiphysics 6.2.0.415 model "Exercise5_3D.mph"
// Outline of the model tree

Parameters
  young = 4.3034[MPa]
  poisson = 0.3601

Geometry
  geom1 "Geometry 1" (3D, length unit m)
    blk1: Block | size = {0.02, 0.02, 0.005}
    fin: Finalize "Form Union"

Physics
  solid: SolidMechanics on all domains
    dependent variable u = {u, v, w}
    lemm1: LinearElasticModel "Linear Elastic Material 1" (default)
      E_mat = userdef
      E = young
      nu_mat = userdef
      nu = poisson
      rho_mat = userdef
      rho = 1116
    free1: Free (default)
    init1: init "Initial Values 1" (default)
    bndl1: BoundaryLoad on boundaries 4 | LoadType = TotalForce; Ftot = {32, 0, 0}
    fix1: Fixed "Fixed Constraint 1" on boundaries 3
    disp1: Displacement2 "Prescribed Displacement 1" on boundaries 4
      Direction = {free, free, prescribed}
      U0 = {0, 0, 0}

Mesh
  mesh1 "Mesh 1" (physics-controlled)

Studies
  std1 "Study 1"
    stat: Stationary

Solver configurations
  sol1 "Solution 1" (study std1)
    v1: Variables "Dependent Variables 1"
    s1: Stationary "Stationary Solver 1"
      fc1: FullyCoupled | linsolver = d1
      d1: Direct "Suggested Direct Solver (solid)" | linsolver = pardiso; pivotperturb = 1.0E-9

Datasets
  dset1: Solution | solution = sol1
  cpt1: CutPoint3D | data = dset1; pointx = 0.01; pointy = 0.01; pointz = 0.0025

Derived values
  pev1: EvalPoint "Point Evaluation 1"
    data = cpt1
    table = tbl1
    expr = {solid.sGpxx, solid.sGpxy, solid.sGpxz, solid.sGpyy, solid.sGpyz, solid.sGpzz}
    descr = {"Stress tensor, xx-component", "Stress tensor, xy-component", "Stress tensor, xz-component", "Stress tensor, yy-component", "Stress tensor, yz-component", "Stress tensor, zz-component"}

Tables
  tbl1: Table
    // Point Evaluation 1
    Stress tensor, xx-component (N/m^2), Point: (0.01, 0.01, 0.0025) | Stress tensor, xy-component (N/m^2), Point: (0.01, 0.01, 0.0025) | Stress tensor, xz-component (N/m^2), Point: (0.01, 0.01, 0.0025) | Stress tensor, yy-component (N/m^2), Point: (0.01, 0.01, 0.0025) | Stress tensor, yz-component (N/m^2), Point: (0.01, 0.01, 0.0025) | Stress tensor, zz-component (N/m^2), Point: (0.01, 0.01, 0.0025)
    -94.1512 | -12.4304 | 83748.7 | -66.4513 | 0.264273 | -112.87

Plots
  pg1: PlotGroup3D "Stress (solid)" | data = dset1
    vol1: Volume | expr = solid.misesGp
      def: Deform "Deformation" | expr = {u, v, w}; descr = Displacement field